// COMSOL Multiphysics 6.1.0.252 model "beamTEST.mph"
// Outline of the model tree

Functions
  extm1: MATLAB | funcs = {Fz, t}

Probes
  point1: Point "点探针 1" on points 2 | expr = w; unit = m; descr = 位移场，Z 分量; table = tbl1

Geometry
  geom1 "几何 1" (3D, length unit m)
    ls1: LineSegment "线段 1" | specify1 = coord; specify2 = coord; coord2 = {2700[mm], 0, 0}
    pt1: Point "点 1" | p = {1350[mm], , }
    fin: Finalize "形成联合体"

Materials
  mat1: Common "Beammat" on all edges
    def "Basic"
      density = 1780*10^(-9)[kg/mm^3]
    Enu "Young's modulus and Poisson's ratio"
      E = 45[GPa]
      nu = 0.3

Physics
  beam: HermitianBeam "梁" on all edges
    dependent variable u = {u, v, w}
    emm1: Elastic "线弹性材料 1" (default) | ForceLinearStrainRes = 1
      dmp1: Damping "阻尼 1" on all edges | beta_dK = 1/450
    csd1: CrossSectionBeam "横截面数据 1" (default) | CrossSectionDefinition = CommonSections; hy_rect = 0.01; hz_rect = 0.01
      so1: BeamSectionOrientation "截面方向 1" (default) | point_beam = {0, 0, 1}
    free1: Free "自由 1" (default)
    init1: init "初始值 1" (default)
    pdr1: DispRot0 "指定位移/旋转 1" on points 1
      RotationType = RotationGroup
      Direction = {prescribed, prescribed, prescribed}
    pdr2: DispRot0 "指定位移/旋转 2" on points 3 | Direction = {prescribed, prescribed, prescribed}
    pl1: PointLoad "点载荷 1" on points 2 | Fp = {0, 0, 1.0}
    pl2: PointLoad "点载荷 2" on points 2 | Fp = {0, 0, Fz(t)}

Mesh
  mesh1 "网格 1" (physics-controlled)
    size: MeshSizeDefault "大小" | hauto = 1

Studies
  std1 "研究 1"
    stat: Stationary "稳态" | geometricNonlinearity = on; disabledphysics = beam/pl2
  std2 "研究 2"
    time: Transient "瞬态"
      tlist = range(0,0.005,0.2)
      geometricNonlinearity = on
      disabledphysics = beam/pl1
      useinitsol = on
      initmethod = sol
      initstudy = std1
      usesol = on
      notsolmethod = sol
      notstudy = std1

Solver configurations
  sol1 "解 1" (study std1)
    v1: Variables "因变量 1"
    s1: Stationary "稳态求解器 1"
      dDef: Direct "直接"
      fc1: FullyCoupled "全耦合 1" | linsolver = dDef
  sol2 "解 2" (study std2)
    v1: Variables "因变量 1"
      comp1_beam_thLin: Field "旋转场 (comp1.beam.thLin)" | scalemethod = manual; scaleval = pi/10
      comp1_beam_uLin: Field "位移场 (comp1.beam.uLin)" | scalemethod = manual; scaleval = 1e-2*2.7
    t1: Time "瞬态求解器 1" | tlist = range(0,0.005,0.2); rtol = 0.001; timemethod = genalpha
      dDef: Direct "直接"
      fc1: FullyCoupled "全耦合 1" | linsolver = dDef

Datasets
  dset1: Solution | solution = sol1
  dset2: Solution "探针解 2" | solution = sol2
  avh1: Average "点探针 1" on points 2 | data = dset2
  dset3: Solution | solution = sol2
  extm1_ds1: Grid1D "一维栅格 1"

Derived values
  pev1: EvalPoint "点探针 1" | data = avh1; table = tbl1; expr = w

Plots
  pg2: PlotGroup1D "探针绘图组 2"
    tblp1: Table "探针表图 1" | table = tbl1
  pg3: PlotGroup3D "应力 (beam)" | data = dset1
    line1: Line "线 1" | expr = beam.mises
      def: Deform "变形" | expr = {u, v, w}
  pg4: PlotGroup3D "应力 (beam) 1" | data = dset1
    line1: Line "线 1" | expr = beam.mises
      def: Deform "变形" | expr = {u, v, w}
  pg5: PlotGroup3D "应力 (beam) 2" | data = dset1
    line1: Line "线 1" | expr = beam.mises
      def: Deform "变形" | expr = {u, v, w}
  pg6: PlotGroup1D "一维绘图组 6" | data = extm1_ds1; title = Fz(t)
    plot1: Function "函数 1" | expr = Fz(t)